*HEADING
Aterro sobre argila Modified Cam Clay - adaptacao FLAC3D / Abaqus Standard
** Unidades: m, N, Pa, kg, s. Modelo 2D em deformacao plana.
** Origem na base; y vertical. Meia fundacao: 20 m x 10 m.
** Malha: 20 x 10 elementos CPE8RP; 661 nos, 200 elementos.
** Fonte: EmbankmentLoad.dat, documentacao FLAC3D 7.0:
** https://docs.itascacg.com/flac3d700/flac3d/zone/test3d/
** ExampleApplications/EmbankmentLoad/embankmentload.html
**
** EXECUCAO no Abaqus Command, na pasta deste arquivo:
** abaqus job=aterro_camclay input=aterro_camclay.inp interactive
** Se o comando abaqus nao existir na Learning Edition 2026:
** use abq2026le em seu lugar, se esse for o comando instalado.
** Alternativa CAE: Job > Create > Source: Input file > este .inp.
** Conferencia de entrada: adicionar datacheck ao comando de execucao.
** RESULTADOS: arquivo aterro_camclay.odb, modulo Visualization.
** Recalque = -U2; POR = pressao TOTAL da agua em Pa.
** Excesso de pressao = POR - 10000*(10-y).
** Tensoes S sao EFETIVAS. PEEQ neste modelo = a = pc/2.
** Historicos U2: conjuntos MON_U0, MON_U2, MON_U4, MON_U6.
** Historicos POR: cantos dos elementos nos pontos de monitoracao.
** Media dos quatro valores POR em MON_P1 -> ponto (0.5,9.5).
** Media dos quatro valores POR em MON_P2 -> ponto (1.5,7.5).
** Subtrair U2 do final de GEOSTATIC para medir somente efeito do aterro.
**
** ESCOLHAS E LIMITES DA ADAPTACAO:
** 1) Segue o CODIGO publicado: pref=1000 Pa, NAO os 100 Pa da tabela.
**    vlambda=2.858; pc0=160000 Pa; M=.888; lambda=.161; kappa=.062.
** 2) No FLAC, ratio .7 e aplicado ANTES de inicializar a poropressao.
**    rho_d=2000; n=.3; rho_w=1000; g=10 -> gamma_sat=23000.
**    Tensoes efetivas: sigma_yy=-13000*d; sigma_xx=sigma_zz=-6100*d.
**    K0 efetivo=61/130, proximo de 6/13 informado no texto.
** 3) kFLAC=1e-12 m^2/(Pa*s). No Abaqus: k=gamma_w*kFLAC=1e-8 m/s.
** 4) FLAC separa volume especifico mecanico v de porosidade hidraulica n.
**    Abaqus usa e tambem na lei mecanica. Mantem-se e0=n/(1-n)=3/7.
**    Para preservar rigidez inicial e taxa inicial de encruamento:
**    vFLAC0=2.858-.161*ln(160000/1000)+.062*ln(160000/p0).
**    lambdaA=lambda*(1+e0)/vFLAC0; kappaA=kappa*(1+e0)/vFLAC0.
**    p0 e vFLAC0 sao calculados no centro de cada camada de 1 m.
**    Assim (1+e0)/kappaA=vFLAC0/kappa e analogamente para lambda-kappa.
**    As 10 definicoes materiais representam essa conversao, NAO estratos.
** 5) beta=1, K=1, a0=80000 Pa recuperam a superficie Modified Cam Clay.
**    Graos incompressiveis e Kw=2e8 Pa; nu=.3 constante.
** 6) Carregamento rapido em 1 s aproxima resposta nao drenada.
**    Topo drenante em todas as etapas; laterais e base sem fluxo.
**    Fluxo interno nao e literalmente desligado como no FLAC.
** 7) Integracao, cinematica e evolucao constitutiva dos programas diferem.
**    NLGEOM=NO, como large-strain off. O teto K=5e6 Pa do FLAC nao e imposto.
**    Resultados precisam de verificacao de convergencia e comparacao.
**    Referencia publicada: ~0.14 m rapido e ~0.19 m ao final; nao sao
**    resultados calculados ou garantidos para este arquivo.
** 8) Arquivo gerado e verificado estruturalmente, mas NAO executado
**    com Abaqus neste ambiente. Nao ha solver Abaqus instalado.
**
*PREPRINT, ECHO=NO, MODEL=NO, HISTORY=NO, CONTACT=NO
*NODE
1, 0, 0
2, 0.5, 0
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*ELEMENT, TYPE=CPE8RP, ELSET=EALL
1, 1, 3, 65, 63, 2, 43, 64, 42
2, 3, 5, 67, 65, 4, 44, 66, 43
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*NSET, NSET=NALL
1, 2, 3, 4, 5, 6
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*NSET, NSET=PORE_NODES
1, 3, 5, 7, 9, 11
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*NSET, NSET=LEFT
1, 42, 63, 104, 125, 166
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*NSET, NSET=RIGHT
41, 62, 103, 124, 165, 186
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*NSET, NSET=BASE
1, 2, 3, 4, 5, 6
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*NSET, NSET=TOP
621, 622, 623, 624, 625, 626
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*NSET, NSET=TOP_PORE
621, 623, 625, 627, 629, 631
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*NSET, NSET=P_ROW_00
1, 3, 5, 7, 9, 11
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*NSET, NSET=P_ROW_01
63, 65, 67, 69, 71, 73
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*NSET, NSET=P_ROW_02
125, 127, 129, 131, 133, 135
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*NSET, NSET=P_ROW_03
187, 189, 191, 193, 195, 197
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*NSET, NSET=P_ROW_04
249, 251, 253, 255, 257, 259
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*NSET, NSET=P_ROW_05
311, 313, 315, 317, 319, 321
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*NSET, NSET=P_ROW_06
373, 375, 377, 379, 381, 383
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*NSET, NSET=P_ROW_07
435, 437, 439, 441, 443, 445
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*NSET, NSET=P_ROW_08
497, 499, 501, 503, 505, 507
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*NSET, NSET=P_ROW_09
559, 561, 563, 565, 567, 569
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*NSET, NSET=P_ROW_10
621, 623, 625, 627, 629, 631
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*NSET, NSET=MON_SETTLEMENT
621, 625, 629, 633
*NSET, NSET=MON_P1
559, 561, 623, 621
*NSET, NSET=MON_P2
437, 439, 501, 499
*ELSET, ELSET=LAYER_00
1, 2, 3, 4, 5, 6
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*ELSET, ELSET=LAYER_01
21, 22, 23, 24, 25, 26
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*ELSET, ELSET=LAYER_02
41, 42, 43, 44, 45, 46
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*ELSET, ELSET=LAYER_03
61, 62, 63, 64, 65, 66
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*ELSET, ELSET=LAYER_04
81, 82, 83, 84, 85, 86
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*ELSET, ELSET=LAYER_05
101, 102, 103, 104, 105, 106
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*ELSET, ELSET=LAYER_06
121, 122, 123, 124, 125, 126
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*ELSET, ELSET=LAYER_07
141, 142, 143, 144, 145, 146
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*ELSET, ELSET=LAYER_08
161, 162, 163, 164, 165, 166
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*ELSET, ELSET=LAYER_09
181, 182, 183, 184, 185, 186
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*ELSET, ELSET=LOADED_TOP
181, 182, 183, 184
** Camada 00: y=0.500; p0=79800 Pa; vFLAC0=2.08402733502.
*MATERIAL, NAME=CLAY_00
*DENSITY
2000.
*POROUS ELASTIC, TYPE=LOGARITHMIC, SHEAR=POISSON
0.0425001280373, 0.3, 0.
*CLAY PLASTICITY, HARDENING=EXPONENTIAL
0.11036323571, 0.888, 80000., 1., 1.
*PERMEABILITY, TYPE=ISOTROPIC, SPECIFIC=10000.
1.e-8, 0.428571428571
*POROUS BULK MODULI
0., 2.e8
*SOLID SECTION, ELSET=LAYER_00, MATERIAL=CLAY_00
1.
** Camada 01: y=1.500; p0=71400 Pa; vFLAC0=2.09092332439.
*MATERIAL, NAME=CLAY_01
*DENSITY
2000.
*POROUS ELASTIC, TYPE=LOGARITHMIC, SHEAR=POISSON
0.0423599600895, 0.3, 0.
*CLAY PLASTICITY, HARDENING=EXPONENTIAL
0.1099992512, 0.888, 80000., 1., 1.
*PERMEABILITY, TYPE=ISOTROPIC, SPECIFIC=10000.
1.e-8, 0.428571428571
*POROUS BULK MODULI
0., 2.e8
*SOLID SECTION, ELSET=LAYER_01, MATERIAL=CLAY_01
1.
** Camada 02: y=2.500; p0=63000 Pa; vFLAC0=2.09868343926.
*MATERIAL, NAME=CLAY_02
*DENSITY
2000.
*POROUS ELASTIC, TYPE=LOGARITHMIC, SHEAR=POISSON
0.0422033294373, 0.3, 0.
*CLAY PLASTICITY, HARDENING=EXPONENTIAL
0.109592516765, 0.888, 80000., 1., 1.
*PERMEABILITY, TYPE=ISOTROPIC, SPECIFIC=10000.
1.e-8, 0.428571428571
*POROUS BULK MODULI
0., 2.e8
*SOLID SECTION, ELSET=LAYER_02, MATERIAL=CLAY_02
1.
** Camada 03: y=3.500; p0=54600 Pa; vFLAC0=2.10755569156.
*MATERIAL, NAME=CLAY_03
*DENSITY
2000.
*POROUS ELASTIC, TYPE=LOGARITHMIC, SHEAR=POISSON
0.0420256645772, 0.3, 0.
*CLAY PLASTICITY, HARDENING=EXPONENTIAL
0.109131161241, 0.888, 80000., 1., 1.
*PERMEABILITY, TYPE=ISOTROPIC, SPECIFIC=10000.
1.e-8, 0.428571428571
*POROUS BULK MODULI
0., 2.e8
*SOLID SECTION, ELSET=LAYER_03, MATERIAL=CLAY_03
1.
** Camada 04: y=4.500; p0=46200 Pa; vFLAC0=2.11791304481.
*MATERIAL, NAME=CLAY_04
*DENSITY
2000.
*POROUS ELASTIC, TYPE=LOGARITHMIC, SHEAR=POISSON
0.0418201440274, 0.3, 0.
*CLAY PLASTICITY, HARDENING=EXPONENTIAL
0.108597470781, 0.888, 80000., 1., 1.
*PERMEABILITY, TYPE=ISOTROPIC, SPECIFIC=10000.
1.e-8, 0.428571428571
*POROUS BULK MODULI
0., 2.e8
*SOLID SECTION, ELSET=LAYER_04, MATERIAL=CLAY_04
1.
** Camada 05: y=5.500; p0=37800 Pa; vFLAC0=2.13035462793.
*MATERIAL, NAME=CLAY_05
*DENSITY
2000.
*POROUS ELASTIC, TYPE=LOGARITHMIC, SHEAR=POISSON
0.0415759082597, 0.3, 0.
*CLAY PLASTICITY, HARDENING=EXPONENTIAL
0.107963245642, 0.888, 80000., 1., 1.
*PERMEABILITY, TYPE=ISOTROPIC, SPECIFIC=10000.
1.e-8, 0.428571428571
*POROUS BULK MODULI
0., 2.e8
*SOLID SECTION, ELSET=LAYER_05, MATERIAL=CLAY_05
1.
** Camada 06: y=6.500; p0=29400 Pa; vFLAC0=2.14593612248.
*MATERIAL, NAME=CLAY_06
*DENSITY
2000.
*POROUS ELASTIC, TYPE=LOGARITHMIC, SHEAR=POISSON
0.0412740284501, 0.3, 0.
*CLAY PLASTICITY, HARDENING=EXPONENTIAL
0.107179331943, 0.888, 80000., 1., 1.
*PERMEABILITY, TYPE=ISOTROPIC, SPECIFIC=10000.
1.e-8, 0.428571428571
*POROUS BULK MODULI
0., 2.e8
*SOLID SECTION, ELSET=LAYER_06, MATERIAL=CLAY_06
1.
** Camada 07: y=7.500; p0=21000 Pa; vFLAC0=2.16679740115.
*MATERIAL, NAME=CLAY_07
*DENSITY
2000.
*POROUS ELASTIC, TYPE=LOGARITHMIC, SHEAR=POISSON
0.0408766544229, 0.3, 0.
*CLAY PLASTICITY, HARDENING=EXPONENTIAL
0.106147441324, 0.888, 80000., 1., 1.
*PERMEABILITY, TYPE=ISOTROPIC, SPECIFIC=10000.
1.e-8, 0.428571428571
*POROUS BULK MODULI
0., 2.e8
*SOLID SECTION, ELSET=LAYER_07, MATERIAL=CLAY_07
1.
** Camada 08: y=8.500; p0=12600 Pa; vFLAC0=2.19846858983.
*MATERIAL, NAME=CLAY_08
*DENSITY
2000.
*POROUS ELASTIC, TYPE=LOGARITHMIC, SHEAR=POISSON
0.0402877844065, 0.3, 0.
*CLAY PLASTICITY, HARDENING=EXPONENTIAL
0.104618278862, 0.888, 80000., 1., 1.
*PERMEABILITY, TYPE=ISOTROPIC, SPECIFIC=10000.
1.e-8, 0.428571428571
*POROUS BULK MODULI
0., 2.e8
*SOLID SECTION, ELSET=LAYER_08, MATERIAL=CLAY_08
1.
** Camada 09: y=9.500; p0=4200 Pa; vFLAC0=2.26658255172.
*MATERIAL, NAME=CLAY_09
*DENSITY
2000.
*POROUS ELASTIC, TYPE=LOGARITHMIC, SHEAR=POISSON
0.0390770803843, 0.3, 0.
*CLAY PLASTICITY, HARDENING=EXPONENTIAL
0.101474353901, 0.888, 80000., 1., 1.
*PERMEABILITY, TYPE=ISOTROPIC, SPECIFIC=10000.
1.e-8, 0.428571428571
*POROUS BULK MODULI
0., 2.e8
*SOLID SECTION, ELSET=LAYER_09, MATERIAL=CLAY_09
1.
*INITIAL CONDITIONS, TYPE=STRESS, GEOSTATIC
EALL, 0., 10., -130000., 0., 0.469230769231, 0.469230769231
*INITIAL CONDITIONS, TYPE=PORE PRESSURE
PORE_NODES, 100000., 0., 0., 10.
*INITIAL CONDITIONS, TYPE=RATIO
NALL, 0.428571428571
** ETAPA 1: conferir equilibrio geostatico com poropressao hidrostatica.
*STEP, NAME=GEOSTATIC, NLGEOM=NO, INC=100
*GEOSTATIC
1., 1., 1.e-8, 1.
*BOUNDARY
LEFT, 1, 1, 0.
RIGHT, 1, 1, 0.
BASE, 1, 2, 0.
P_ROW_00, 8, 8, 100000
P_ROW_01, 8, 8, 90000
P_ROW_02, 8, 8, 80000
P_ROW_03, 8, 8, 70000
P_ROW_04, 8, 8, 60000
P_ROW_05, 8, 8, 50000
P_ROW_06, 8, 8, 40000
P_ROW_07, 8, 8, 30000
P_ROW_08, 8, 8, 20000
P_ROW_09, 8, 8, 10000
P_ROW_10, 8, 8, 0
*DLOAD
EALL, GRAV, 10., 0., -1., 0.
*OUTPUT, FIELD, FREQUENCY=1
*NODE OUTPUT, NSET=NALL
U, RF
*NODE OUTPUT, NSET=PORE_NODES
POR
*ELEMENT OUTPUT, ELSET=EALL
S, E, PE, PEEQ, VOIDR, FLVEL
*OUTPUT, HISTORY, FREQUENCY=1
*NODE OUTPUT, NSET=MON_SETTLEMENT
U2
*NODE OUTPUT, NSET=MON_P1
POR
*NODE OUTPUT, NSET=MON_P2
POR
*END STEP
** ETAPA 2: rampa de 50 kPa de x=0 a 4 m. Tempo fisico: 1 s.
** OP=NEW libera pressao no interior e repoe todos os apoios.
*STEP, NAME=UNDRAINED_LOADING, NLGEOM=NO, INC=1000, AMPLITUDE=RAMP
*SOILS, CONSOLIDATION, UTOL=5000., END=PERIOD
0.01, 1., 1.e-9, 0.05
*BOUNDARY, OP=NEW
LEFT, 1, 1, 0.
RIGHT, 1, 1, 0.
BASE, 1, 2, 0.
TOP_PORE, 8, 8, 0.
** P3 corresponde a aresta superior (nos locais 3-4).
** Gravidade continua ativa por propagacao, OP=MOD.
*DLOAD, OP=MOD
LOADED_TOP, P3, 50000.
*OUTPUT, FIELD, FREQUENCY=1
*NODE OUTPUT, NSET=NALL
U, RF
*NODE OUTPUT, NSET=PORE_NODES
POR
*ELEMENT OUTPUT, ELSET=EALL
S, E, PE, PEEQ, VOIDR, FLVEL
*OUTPUT, HISTORY, FREQUENCY=1
*NODE OUTPUT, NSET=MON_SETTLEMENT
U2
*NODE OUTPUT, NSET=MON_P1
POR
*NODE OUTPUT, NSET=MON_P2
POR
*END STEP
** ETAPA 3: primeiro periodo de consolidacao, 1e5 s apos a carga.
*STEP, NAME=CONSOLIDATION_EARLY, NLGEOM=NO, INC=2000
*SOILS, CONSOLIDATION, UTOL=5000., END=PERIOD
1.e5, 1.e5, 1., 1.e5
** Apoios, topo drenante, gravidade e 50 kPa continuam ativos.
*OUTPUT, FIELD, FREQUENCY=1
*NODE OUTPUT, NSET=NALL
U, RF
*NODE OUTPUT, NSET=PORE_NODES
POR
*ELEMENT OUTPUT, ELSET=EALL
S, E, PE, PEEQ, VOIDR, FLVEL
*OUTPUT, HISTORY, FREQUENCY=1
*NODE OUTPUT, NSET=MON_SETTLEMENT
U2
*NODE OUTPUT, NSET=MON_P1
POR
*NODE OUTPUT, NSET=MON_P2
POR
*END STEP
** ETAPA 4: completar 1e8 s de consolidacao apos a aplicacao da carga.
*STEP, NAME=CONSOLIDATION_LATE, NLGEOM=NO, INC=4000
*SOILS, CONSOLIDATION, UTOL=2500., END=PERIOD
1.e5, 9.99e7, 1., 5.e6
*OUTPUT, FIELD, FREQUENCY=1
*NODE OUTPUT, NSET=NALL
U, RF
*NODE OUTPUT, NSET=PORE_NODES
POR
*ELEMENT OUTPUT, ELSET=EALL
S, E, PE, PEEQ, VOIDR, FLVEL
*OUTPUT, HISTORY, FREQUENCY=1
*NODE OUTPUT, NSET=MON_SETTLEMENT
U2
*NODE OUTPUT, NSET=MON_P1
POR
*NODE OUTPUT, NSET=MON_P2
POR
*END STEP
